solve block
    # guess values
    v := [10, 1, -1; 1, 10, -1; -1, 1, 10]
    c := [11; 10; 10]
    lsolve(v, c) = [1.10202; 0.990909; 1.01111]
end solve block
solve block
    # guess values
    v := [5, 2, -1; -4, 7, 3; 2, -2, 4]
    c := [12; 24; 9]
    lsolve(v, c) = [1.73182; 3.15; 2.95909]
end solve block
solve block
    # guess values
    v := [5, 1, 1, 1; 1, 5, 1, 1; 1, 1, 5, 1; 1, 1, 1, 5]
    c := [12; 11; 13; 14]
    lsolve(v, c) = [1.4375; 1.1875; 1.6875; 1.9375]
end solve block
solve block
    # guess values
    v := [5, 2, 1; 4, 7, 3; 2, 2, 4]
    c := [12; 24; 9]
    lsolve(v, c) = [1.32143; 2.53571; 0.321429]
end solve block
solve block
    # guess values
    v := [1, 2, 3; 3, 5, 7; 1, 3, 4]
    c := [3; 0; 1]
    lsolve(v, c) = [-4; -13; 11]
end solve block
solve block
    # guess values
    v := [1, -1, 3, 1; 4, -1, 5, 4; 2, -2, 4, 1; 1, -4, 5, -1]
    c := [5; 4; 6; 3]
    lsolve(v, c) = [9; 18; 10; -16]
end solve block
solve block
    # guess values
    c := [5; 4; 6; 3]
    v := [0, -1, 3, 1; 4, 0, 5, 4; 2, -2, 0, 1; 1, -4, 5, 0]
    lsolve(v, c) = [-3.14085; -3.22535; -1.35211; 5.83099]
end solve block
v := [0, -1, 3, 1; 4, 0, 5, 4; 2, -2, 0, 1; 1, -4, 5, 0]
b := [0, 0, 0, 0; 0, 0, 0, 0; 2, -2, 0, 1; 1, -4, 5, 0]
|v| = 71
|b| = 0
